<?xml version="1.0"?>
<?xml-stylesheet type="text/xsl" href="http://jsbsim.sourceforge.net/JSBSim.xsl"?>
<fdm_config name="HP-Hampden-Mk1" version="2.0" release="ALPHA"
   xmlns:xsi="http://www.w3.org/2001/XMLSchema-instance"
   xsi:noNamespaceSchemaLocation="http://jsbsim.sourceforge.net/JSBSim.xsd">

 <fileheader>
  <author> Aeromatic v 0.91 </author>
  <filecreationdate> 2009-10-15 </filecreationdate>
  <version>$Revision: 1.10 $</version>
  <description> Models a Handley-Page Hampden MkII. </description>
 </fileheader>

<!--
  File:     HP-Hampden Mk1.xml
  Inputs:
    name:          HP-Hampden Mk1
    type:          WWII RAF fighter bomber, ground attack
    max weight:    18756 lb
    wing span:     69.22 ft
    length:        53.3 ft
    wing area:     749 sq-ft
    gear type:     tail dragger
    retractable?:  yes
    # engines:     2
    engine type:   piston
    engine layout: wings
    yaw damper?    no

  Outputs:
    wing loading:  30.7 lb/sq-ft
    CL-alpha:      4.5 per radian
    CL-0:          0.17
    CL-max:        1.2
    CD-0:          0.02
    K:             0.06

-->

 <metrics>
   <wingarea  unit="FT2">  749.00 </wingarea>
   <wingspan  unit="FT" >   69.20 </wingspan>
   <wing_incidence>          2.0 </wing_incidence>
   <chord     unit="FT" >    10.1 </chord>
   <htailarea unit="FT2">   70.35 </htailarea>
   <htailarm  unit="FT" >   34.58 </htailarm>
   <vtailarea unit="FT2">   25.50 </vtailarea>
   <vtailarm  unit="FT" >   34.78 </vtailarm>
   <location name="AERORP" unit="M">
     <x>  -0.056 </x>
     <y>   0.00 </y>
     <z>   0.09 </z>
   </location>
   <location name="EYEPOINT" unit="M">
     <x>  0.0 </x>
     <y>   0.00 </y>
     <z>  0.00 </z>
   </location>
   <location name="VRP" unit="M">
     <x>0.</x>
     <y>0.0</y>
     <z>0.0</z>
   </location>
 </metrics>

 <mass_balance>
   <ixx unit="SLUG*FT2">     57000 </ixx>
   <iyy unit="SLUG*FT2">     41000 </iyy>
   <izz unit="SLUG*FT2">     30000 </izz>
   <emptywt unit="LBS" >     13270 </emptywt>
   <location name="CG" unit="M">
     <x>  0.218 </x>
     <y>   0.00 </y>
     <z>   -0.107 </z>
   </location>
      </mass_balance>

   <pointmass name="Crew" >
      <weight unit="LBS"> 275 </weight>
      <location name="POINTMASS" unit = "M">
        <x> -1.950 </x>
        <y>  0.00 </y>
        <z> 0.10 </z>
      </location>
    </pointmass>

 <ground_reactions>

  <contact type="BOGEY" name="LEFT_MAIN">
   <location unit="M">
     <x> -0.334 </x>
     <y> -2.71 </y>
     <z> -2.407 </z>
   </location>
   <static_friction>  0.80 </static_friction>
   <dynamic_friction> 0.50 </dynamic_friction>
   <rolling_friction> 0.002 </rolling_friction>
   <spring_coeff unit="LBS/FT">      15000 </spring_coeff>
   <damping_coeff unit="LBS/FT/SEC"> 4200 </damping_coeff>
   <brake_group>LEFT</brake_group>
   <retractable>1</retractable>
 </contact>

  <contact type="BOGEY" name="RIGHT_MAIN">
   <location unit="M">
     <x> -0.334 </x>
     <y> 2.71 </y>
     <z> -2.407 </z>
   </location>
   <static_friction>  0.80 </static_friction>
   <dynamic_friction> 0.50 </dynamic_friction>
   <rolling_friction> 0.002 </rolling_friction>
   <spring_coeff unit="LBS/FT">      15000 </spring_coeff>
   <damping_coeff unit="LBS/FT/SEC"> 4200 </damping_coeff>
   <brake_group>RIGHT</brake_group>
   <retractable>1</retractable>
 </contact>

<contact type="BOGEY" name="TAIL">
   <location unit="M">
     <x>  9.72 </x>
     <y>   0.00 </y>
     <z> -0.38 </z>
   </location>
   <static_friction>  0.80 </static_friction>
   <dynamic_friction> 0.50 </dynamic_friction>
   <rolling_friction> 0.002 </rolling_friction>
   <spring_coeff unit="LBS/FT">       7800 </spring_coeff>
   <damping_coeff unit="LBS/FT/SEC">  2100 </damping_coeff>
   <max_steer unit="DEG"> -40.00 </max_steer>
   <brake_group>NONE</brake_group>
   <retractable>0</retractable>
 </contact>

  <contact type="STRUCTURE" name="LEFT_WING">
    <location unit="M">
     <x> -0.289 </x>
     <y> -10.551 </y>
     <z>  0.71 </z>
    </location>
    <static_friction>  0.80 </static_friction>
    <dynamic_friction> 0.50 </dynamic_friction>
    <spring_coeff unit="LBS/FT">       2000.00 </spring_coeff>
    <damping_coeff unit="LBS/FT/SEC"> 10000.00 </damping_coeff>
 </contact>

<contact type="STRUCTURE" name="NOSE">
    <location unit="M">
     <x> -4.139 </x>
     <y> 0.0 </y>
     <z>  -0.98 </z>
    </location>
    <static_friction>  0.80 </static_friction>
    <dynamic_friction> 0.50 </dynamic_friction>
    <spring_coeff unit="LBS/FT">       2000.00 </spring_coeff>
    <damping_coeff unit="LBS/FT/SEC"> 10000.00 </damping_coeff>
 </contact>

  <contact type="STRUCTURE" name="RIGHT_WING">
    <location unit="M">
     <x> -0.289 </x>
     <y>  10.551 </y>
     <z>  0.71 </z>
    </location>
    <static_friction>  0.80 </static_friction>
    <dynamic_friction> 0.50 </dynamic_friction>
    <spring_coeff unit="LBS/FT">       2000.00 </spring_coeff>
    <damping_coeff unit="LBS/FT/SEC"> 10000.00 </damping_coeff>
 </contact>

  <contact type="STRUCTURE" name="TAILHIGH_LEFT">
    <location unit="M">
     <x>   11.34 </x>
     <y>   -2.46 </y>
     <z>   2.064 </z>
    </location>
    <static_friction>  0.80 </static_friction>
    <dynamic_friction> 0.50 </dynamic_friction>
    <spring_coeff unit="LBS/FT">       2000.00 </spring_coeff>
    <damping_coeff unit="LBS/FT/SEC"> 10000.00 </damping_coeff>
 </contact>

<contact type="STRUCTURE" name="TAILHIGH_RIGHT">
    <location unit="M">
     <x>   11.34 </x>
     <y>   2.46 </y>
     <z>   2.494 </z>
    </location>
    <static_friction>  0.80 </static_friction>
    <dynamic_friction> 0.50 </dynamic_friction>
    <spring_coeff unit="LBS/FT">       2000.00 </spring_coeff>
    <damping_coeff unit="LBS/FT/SEC"> 10000.00 </damping_coeff>
 </contact>

 <contact type="STRUCTURE" name="TAILLOW">
    <location unit="M">
     <x> 11.379 </x>
     <y>   0.00 </y>
     <z>   0.430 </z>
    </location>
    <static_friction>  0.80 </static_friction>
    <dynamic_friction> 0.50 </dynamic_friction>
    <spring_coeff unit="LBS/FT">       2000.00 </spring_coeff>
    <damping_coeff unit="LBS/FT/SEC"> 10000.00 </damping_coeff>
 </contact>

 </ground_reactions>

 <propulsion>

   <engine file="Bristol-Pegasus">
    <location unit="M">
      <x> -2.04 </x>
      <y> -2.715 </y>
      <z>  0.003 </z>
    </location>
    <feed>0</feed>
    <feed>1</feed>
    <feed>2</feed>
    <thruster file="Hamilton-Standard">
     <location unit="M">
       <x> -2.58 </x>
       <y> -2.715 </y>
       <z> 0.003 </z>
     </location>
     <orient unit="DEG">
       <pitch> 0.00 </pitch>
       <roll>  0.00 </roll>
       <yaw>   0.00 </yaw>
     </orient>
     <sense>-0.17</sense>
     <p_factor> 2 </p_factor>
    </thruster>
  </engine>

   <engine file="Bristol-Pegasus">
    <location unit="IN">
       <x> -2.04 </x>
      <y> 2.715 </y>
      <z> 0.003 </z>
    </location>
    <feed>0</feed>
    <feed>1</feed>
    <feed>2</feed>
    <thruster file="Hamilton-Standard">
     <location unit="M">
       <x> -2.58 </x>
       <y> 2.715 </y>
       <z> 0.003 </z>
     </location>
     <orient unit="DEG">
       <pitch> 0.00 </pitch>
       <roll>  0.00 </roll>
       <yaw>   0.00 </yaw>
     </orient>
     <sense>-0.17</sense>
     <p_factor> 2 </p_factor>
    </thruster>
  </engine>

  <tank type="FUEL" number="0"> <!-- fuselage -->
     <location unit="M">
       <x> 0.15 </x>
       <y>   0.00 </y>
       <z>   0.05 </z>
     </location>
     <capacity unit="LBS"> 1000.00 </capacity>
     <contents unit="LBS"> 1000.00 </contents>
     <priority>1</priority>
     <density unit="LBS/GAL"> 6.0 </density>
  </tank>

  <tank type="FUEL" number="1"> <!-- left wing -->
     <location unit="M">
       <x> -0.28 </x>
       <y> -1.67 </y>
       <z>  0.02 </z>
     </location>
     <density unit="LBS/GAL"> 6.0 </density>
     <capacity unit="LBS"> 760.00 </capacity>
     <contents unit="LBS"> 760.00 </contents>
  </tank>

  <tank type="FUEL" number="2"> <!-- right wing -->
     <location unit="M">
       <x> 0.28 </x>
       <y>  1.67 </y>
       <z>  0.02 </z>
     </location>
     <density unit="LBS/GAL"> 6.0 </density>
     <capacity unit="LBS"> 760.00 </capacity>
     <contents unit="LBS"> 760.00 </contents>
  </tank>

 </propulsion>

<flight_control name="FCS HP-Hampden-Mk1"/>

 <system file="alpha_buffet"/>
 <system file="crash-detect"/>
 <system file="particles"/>
 <system file="armament"/>
 <system file="bomb-bay-doors"/>
 <system file="bombsight"/>
 <system file="canopy"/>
 <system file="gear"/>
 <system file="flaps"/>
 <system file="FCS-pitch"/>
 <system file="FCS-roll"/>
 <system file="FCS-yaw"/>
 <system file="Hampden-autopilot"/>


 <aerodynamics>

     <function name="aero/qbar_tail-psf">
      <description>Thrust tube effects at tail</description>
      <sum>
          <property>aero/qbar-psf</property>
          <product>
            <property>forces/fbx-prop-lbs</property>
            <value>0.0019</value>
          </product>
      </sum>
    </function>

        <function name="aero/function/kCDge">
            <description>Change_in_drag_due_to_ground_effect</description>
            <product>
                  <table>
                      <independentVar>aero/h_b-mac-ft</independentVar>
                      <tableData>
                          0.0000	0.4800
                          0.1000	0.5150
                          0.1500	0.6290
                          0.2000	0.7090
                          0.3000	0.8150
                          0.4000	0.8820
                          0.5000	0.9280
                          0.6000	0.9620
                          0.7000	0.9880
                          0.8000	1.0000
                      </tableData>
                  </table>
            </product>
        </function>

        <function name="aero/function/kCLge">
            <description>Change_in_lift_due_to_ground_effect</description>
            <product>
                  <table>
                      <independentVar>aero/h_b-mac-ft</independentVar>
                      <tableData>
                          0.0000	1.2030
                          0.1000	1.1270
                          0.1500	1.0900
                          0.2000	1.0730
                          0.3000	1.0460
                          0.4000	1.0550
                          0.5000	1.0190
                          0.6000	1.0130
                          0.7000	1.0080
                          0.8000	1.0060
                          0.9000	1.0030
                          1.0000	1.0020
                          1.1000	1.0000
                      </tableData>
                  </table>
            </product>
        </function>

  <axis name="LIFT">

    <function name="aero/coefficient/CLalpha">
      <description>Lift_due_to_alpha</description>
      <product>
          <property>aero/qbar-psf</property>
          <property>metrics/Sw-sqft</property>
          <table>
            <independentVar lookup="row">aero/alpha-rad</independentVar>
            <tableData>
                             -0.2000   -0.782
                             -0.157    -0.576
                             -0.107    -0.398
                             -0.0523   -0.192
                             -0.0350   -0.067
                             -0.0175   -0.09
                              0.0000   0.09
                              0.0175   0.245
                              0.0350   0.328
                              0.0523   0.48
                              0.1047   0.795
                              0.1396   0.974
                              0.1745   1.199
                              0.226    1.40
                              0.2617   1.240
                              0.3300   0.8250
                              0.56    0.2740
            </tableData>
          </table>
      </product>
    </function>

    <function name="aero/coefficient/dCLflap">
       <description>Delta_Lift_due_to_flaps</description>
       <product>
           <property>aero/qbar-psf</property>
           <property>metrics/Sw-sqft</property>
           <property>fcs/flap-pos-deg</property>
           <value> 0.039 </value>
       </product>
    </function>

    <function name="aero/coefficient/CLde">
       <description>Lift_due_to_Elevator_Deflection</description>
       <product>
           <property>aero/qbar-psf</property>
           <property>metrics/Sw-sqft</property>
           <property>fcs/elevator-pos-rad</property>
           <value>0.15</value>
       </product>
    </function>

  </axis>

  <axis name="DRAG">

    <function name="aero/coefficient/CD0">
       <description>Drag_at_zero_lift</description>
       <product>
          <property>aero/qbar-psf</property>
          <property>metrics/Sw-sqft</property>
          <table>
            <independentVar lookup="row">aero/alpha-rad</independentVar>
            <tableData>
                            -0.2000   0.1082
                             -0.157    0.06936
                             -0.107    0.0478
                             -0.0523   0.0242
                             -0.0350   0.0139
                             -0.0175   0.0116
                              0.0000   0.0108
                              0.0175   0.0111
                              0.0350   0.0121
                              0.0523   0.0140
                              0.0872   0.0206
                              0.1221   0.0304
                              0.1745   0.0509
                              0.2600   0.0940
                              0.3300   0.1950
                              0.6000   0.2740
            </tableData>
          </table>
       </product>
    </function>

    <function name="aero/coefficient/CDi">
       <description>Induced_drag</description>
         <product>
           <property>aero/qbar-psf</property>
           <property>metrics/Sw-sqft</property>
           <property>aero/cl-squared</property>
           <value>0.051</value>
         </product>
    </function>

    <function name="aero/coefficient/CDmach">
       <description>Drag_due_to_mach</description>
        <product>
          <property>aero/qbar-psf</property>
          <property>metrics/Sw-sqft</property>
          <table>
            <independentVar lookup="row">velocities/mach</independentVar>
            <tableData>
                0.00      0.000
                0.75      0.000
                1.10      0.040
            </tableData>
          </table>
        </product>
    </function>

    <function name="aero/coefficient/CDflap">
       <description>Drag_due_to_flaps</description>
         <product>
           <property>aero/qbar-psf</property>
           <property>metrics/Sw-sqft</property>
           <property>fcs/flap-pos-deg</property>
           <value> 0.0047 </value>
         </product>
    </function>

    <function name="aero/coefficient/CDgear">
       <description>Drag_due_to_gear</description>
         <product>
           <property>aero/qbar-psf</property>
           <property>metrics/Sw-sqft</property>
           <property>gear/gear-pos-norm</property>
           <value>0.054</value>
         </product>
    </function>


    <function name="aero/coefficient/CDbeta">
       <description>Drag_due_to_sideslip</description>
       <product>
          <property>aero/qbar-psf</property>
          <property>metrics/Sw-sqft</property>
          <table>
            <independentVar lookup="row">aero/beta-rad</independentVar>
            <tableData>
              -1.57    1.230
              -0.20    0.059
               0.00    0.000
               0.20    0.059
               1.57    1.230
            </tableData>
          </table>
       </product>
    </function>

    <function name="aero/coefficient/CDde">
       <description>Drag_due_to_Elevator_Deflection</description>
       <product>
           <property>aero/qbar-psf</property>
           <property>metrics/Sw-sqft</property>
           <abs><property>fcs/elevator-pos-norm</property></abs>
           <value>0.034</value>
       </product>
    </function>

  </axis>

  <axis name="SIDE">

    <function name="aero/coefficient/CYb">
       <description>Side_force_due_to_beta</description>
       <product>
           <property>aero/qbar-psf</property>
           <property>metrics/Sw-sqft</property>
           <property>aero/beta-rad</property>
           <value>-1.17</value>
       </product>
    </function>

  </axis>

  <axis name="ROLL">

    <function name="aero/coefficient/Clb">
       <description>Roll_moment_due_to_beta</description>
       <product>
           <property>aero/qbar-psf</property>
           <property>metrics/Sw-sqft</property>
           <property>metrics/bw-ft</property>
           <property>aero/beta-rad</property>
           <value>-0.07</value>
       </product>
    </function>

    <function name="aero/coefficient/Clp">
       <description>Roll_moment_due_to_roll_rate</description>
       <product>
           <property>aero/qbar-psf</property>
           <property>metrics/Sw-sqft</property>
           <property>metrics/bw-ft</property>
           <property>aero/bi2vel</property>
           <property>velocities/p-aero-rad_sec</property>
           <value>-0.3</value>
       </product>
    </function>

    <function name="aero/coefficient/Clr">
       <description>Roll_moment_due_to_yaw_rate</description>
       <product>
           <property>aero/qbar-psf</property>
           <property>metrics/Sw-sqft</property>
           <property>metrics/bw-ft</property>
           <property>aero/bi2vel</property>
           <property>velocities/r-aero-rad_sec</property>
           <value>0.07</value>
       </product>
    </function>

    <function name="aero/coefficient/Clda">
       <description>Roll_moment_due_to_aileron</description>
       <product>
          <property>aero/qbar-psf</property>
          <property>metrics/Sw-sqft</property>
          <property>metrics/bw-ft</property>
          <property>fcs/left-aileron-pos-rad</property>
          <value>0.11</value>
       </product>
    </function>

    <function name="aero/coefficient/Cldr">
       <description>Roll_moment_due_to_rudder</description>
       <product>
           <property>aero/qbar-psf</property>
           <property>metrics/Sw-sqft</property>
           <property>metrics/bw-ft</property>
           <property>fcs/rudder-pos-rad</property>
           <value>0.009</value>
       </product>
    </function>

  </axis>

  <axis name="PITCH">

   <function name="aero/coefficient/Cmflap">
                <description>Pitch_moment_due_to_flaps</description>
                <product>
                    <property>aero/qbar-psf</property>
                    <property>metrics/Sw-sqft</property>
                    <property>metrics/cbarw-ft</property>
                    <property>fcs/flap-pos-norm</property>
                    <value>-0.0042</value>
                </product>
            </function>

            <function name="aero/coefficient/Cmgear">
                <description>Pitch_moment_due_to_gear</description>
                <product>
                    <property>aero/qbar-psf</property>
                    <property>metrics/Sw-sqft</property>
                    <property>metrics/cbarw-ft</property>
                    <property>gear/gear-pos-norm</property>
                    <value>-0.0095</value>
                </product>
            </function>

    <function name="aero/coefficient/Cmalpha">
       <description>Pitch_moment_due_to_alpha</description>
       <product>
           <property>aero/qbar-psf</property>
           <property>metrics/Sw-sqft</property>
           <property>metrics/cbarw-ft</property>
           <property>aero/alpha-rad</property>
           <value>-0.5</value>
       </product>
    </function>

    <function name="aero/coefficient/Cmde">
       <description>Pitch_moment_due_to_elevator</description>
       <product>
          <property>aero/qbar-psf</property>
          <property>metrics/Sw-sqft</property>
          <property>metrics/cbarw-ft</property>
          <property>fcs/elevator-pos-rad</property>
          <value>-0.7</value>
       </product>
    </function>

    <function name="aero/coefficient/Cmq">
       <description>Pitch_moment_due_to_pitch_rate</description>
       <product>
           <property>aero/qbar-psf</property>
           <property>metrics/Sw-sqft</property>
           <property>metrics/cbarw-ft</property>
           <property>aero/ci2vel</property>
           <property>velocities/q-aero-rad_sec</property>
           <value>-16</value>
       </product>
    </function>

    <function name="aero/coefficient/Cmadot">
       <description>Pitch_moment_due_to_alpha_rate</description>
       <product>
           <property>aero/qbar-psf</property>
           <property>metrics/Sw-sqft</property>
           <property>metrics/cbarw-ft</property>
           <property>aero/ci2vel</property>
           <property>aero/alphadot-rad_sec</property>
           <value>-7</value>
       </product>
    </function>

<function name="aero/coefficient/CXa">
                <description>Pitch_force_due_to_alpha</description>
                <product>
                    <property>aero/qbar-psf</property>
                    <property>metrics/Sw-sqft</property>
                    <property>aero/alpha-rad</property>
                    <value>-1.03</value>
                </product>
            </function>

  </axis>

  <axis name="YAW">

    <function name="aero/coefficient/Cnb">
       <description>Yaw_moment_due_to_beta</description>
       <product>
           <property>aero/qbar-psf</property>
           <property>metrics/Sw-sqft</property>
           <property>metrics/bw-ft</property>
           <property>aero/beta-rad</property>
           <value>0.11</value>
       </product>
    </function>

    <function name="aero/coefficient/Cnr">
       <description>Yaw_moment_due_to_yaw_rate</description>
       <product>
           <property>aero/qbar-psf</property>
           <property>metrics/Sw-sqft</property>
           <property>metrics/bw-ft</property>
           <property>aero/bi2vel</property>
           <property>velocities/r-aero-rad_sec</property>
           <value>-0.15</value>
       </product>
    </function>

    <function name="aero/coefficient/Cndr">
       <description>Yaw_moment_due_to_rudder</description>
       <product>
           <property>aero/qbar-psf</property>
           <property>metrics/Sw-sqft</property>
           <property>metrics/bw-ft</property>
           <property>fcs/rudder-pos-rad</property>
           <value>-0.1</value>
       </product>
    </function>

    <function name="aero/coefficient/Cnda">
       <description>Adverse_yaw</description>
       <product>
           <property>aero/qbar-psf</property>
           <property>metrics/Sw-sqft</property>
           <property>metrics/bw-ft</property>
           <property>fcs/left-aileron-pos-rad</property>
           <value>-0.006</value>
       </product>
    </function>

  </axis>

 </aerodynamics>

</fdm_config>
